*********************************************************************
** Abaqus/fromNastran Abaqus 3DEXPERIENCE R2017x
**
** reading bulk data from: D:\Abaqus_working\TA_dyna.nastran
**  creating Abaqus input: D:\Abaqus_working\TA_dyna.inp
** writing diagnostics to: D:\Abaqus_working\TA_dyna.log
**
**  environment variables: fromnastran_wtmass_fixup <not present>
**                       : fromnastran_distribution <not present>
**                       : fromnastran_pbar_zero_reset <not present>
**                       : fromnastran_loadcases <not present>
**                       : fromnastran_surface_based_coupling <not present>
**                       : fromnastran_cquad4 <not present>
**                       : fromnastran_chexa <not present>
**                       : fromnastran_ctetra <not present>
**                       : fromnastran_cbar <not present>
**                       : fromnastran_beam_offset_coupling <not present>
**                       : fromnastran_beam_orientation_vector <not present>
**                       : fromnastran_shell_general_section <not present>
**                       : fromnastran_eigensolver <not present>
**                       : fromnastran_plotel <not present>
**                       : fromnastran_cdh_weld <not present>
**                       : fromnastran_spoint_dof <not present>
**
** command line arguments: wtmass_fixup=ON
**                       : distribution=preservePID
**                       : pbar_zero_reset=1e-20
**                       : loadcases=ON
**                       : surface_based_coupling=ON
**                       : cquad4=S4R
**                       : chexa=C3D8I
**                       : ctetra=C3D10M
**                       : cbar=B31
**                       : beam_offset_coupling=ON
**                       : beam_orientation_vector=ON
**                       : shell_general_section=OFF
**                       : plotel <not present>
**                       : cdh_weld <not present>
**                       : eigensolver <not present>
**                       : spoint_dof <not present, using default=9>
**
** --------------------------------
** Nastran Case Control entities processed:
**      keyword   number
** ------------   ------
**   BEGIN BULK        1
** --------------------------------
** Nastran Bulk Data processed:
**      keyword   number
** ------------   ------
**       CTETRA     1851
**      ENDDATA        1
**         GRID      619
**
** environment_variable / command_line_argument summary:
** PARAM,WTMASS will be used to adjust structural mass/density
** *DISTRIBUTION will be used for shell offsets, orientations, and thicknesses
**  shell elements will be grouped by PSHELL ID
** Zero PBAR/PBEAM cross sectional parameters will be reset to 1e-20
** Rigid links will be modeled using surface-based *COUPLING constraints
** Beam orientations will be modeled using vectors on beam sections
** Beam offsets will be modeled using rigid couplings and extra nodes
** PSHELL/PCOMP will default to *SHELL SECTION
** PLOTELs will not be translated
** "CDH welds" (isolated CHEXAs with 8 RBE3s) will not be translated to
**  rigid fasteners
** CWELDs will be translated to compliant fasteners
** CQUAD4 elements will be translated to S4R
** SPOINT DOF 0 will be reset to 9 in DMIG, MPC, CELAS2, and CMASS2 data
**
** ---------------------------------------------------
** ---- *NODE ----------------------------------------
** ---------------------------------------------------
**
** following nodes were defined in the global coordinate system
**
*SYSTEM
**
*NODE, SYSTEM=R
       1,   85.190407,   135.34657,   77.329597
       2,   80.913422,    134.9846,   77.112663
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**
*SECTION CONTROLS, NAME=REDUCED_INTEGRATION_FROMNASTRAN
**
** ---------------------------------------------------
** ---- SOLID elements -------------------------------
** ---------------------------------------------------
**
** following elements refer to a (missing) PSOLID entry with PID = 1
** DUMMY MATERIAL AND SECTION -=>
*MATERIAL, NAME=MATERIAL_PSOLID_1
*ELASTIC
1., 0.
**
*SOLID SECTION, ELSET=PSOLID_1, MATERIAL=MATERIAL_PSOLID_1
**
*ELEMENT, TYPE=C3D4, ELSET=PSOLID_1
1, 1, 2, 3, 4
2, 5, 6, 7, 8
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**
** elset ALL_3DSOLID contains 1851 elements in 1 elsets
*ELSET, ELSET=ALL_3DSOLID
PSOLID_1,
*Orientation, name=Ori-DiscField-1, system=RECTANGULAR
DiscField-1
*Distribution, name=DiscField-1, location=ELEMENT, Table=DiscField-1_Table
 ,           1.,           0.,           0.,           0.,           1.,           0.
1,-0.44131,0.89636,-0.042125,0.41449,0.40198,0.81647
2,-0.09249,0.99571,-0.0002652,0.67029,0.068637,0.73892
3,-0.44515,0.89439,-0.043577,0.41012,0.40638,0.81649
4,-0.41148,0.91121,-0.019661,0.44708,0.36814,0.81522
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1851,-0.023216,0.99972,-0.004879,0.69866,0.01661,0.71527
**
** elset ALL_MASSIVE_ELEMENTS contains all 1851 elements that can have mass
*ELSET, ELSET=ALL_MASSIVE_ELEMENTS
ALL_3DSOLID,
*STEP
WARNING: did not find "SOL=" in Nastran file
*STATIC
*END STEP
