*Heading
** Job name: 270717_ep2d_mddw12_right_TA_isolated Model name: 270717_ep2d_mddw12_right_TA_isolated
** Generated by: Abaqus/CAE 2017
*Preprint, echo=NO, model=NO, history=NO, contact=NO
**
** PARTS
**
*Part, name=PART-1
*Node
1,    80.763031,   211.612137,   92.6058884
2,   78.7798615,   213.738724,   85.9242706
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*Element, type=C3D4
1,   1,   2,   3,   4
2,   5,   6,   7,   8
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*Elset, elset=PSOLID_1, generate
1,  2534,     1
*Orientation, name=Ori-TA_TEST_DISCFIELD-1, system=RECTANGULAR
TA_TEST_DISCFIELD-1
1, 0.
*Solid Section, elset=PSOLID_1, orientation=Ori-PART-1_TA_TEST_DISCFIELD-1, material=MATERIAL_PSOLID_1
,
*Distribution, name=TA_TEST_DISCFIELD-1, location=ELEMENT, Table=TA_TEST_DISCFIELD-1_Table
,           1.,           0.,           0.,           0.,           1.,           0.
1, -0.12127, 0.99124, 0.052372, 0.65637, 0.092385, 0.74876
2, 0.22938, 0.97331, -0.0076481, 0.76907, -0.14705, 0.62202
3, -0.13418, 0.99056, 0.028203, 0.65019, 0.10262, 0.75281
4, -0.067599, 0.95589, 0.28583, 0.68046, 0.050572, 0.73104
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2534, 0.26984, 0.96272, 0.01869, 0.77687, -0.17081, 0.60606
** Section: Section-1-PSOLID_1
*Solid Section, elset=PSOLID_1, material=MATERIAL_PSOLID_1
,
*End Part
**
**
** ASSEMBLY
**
*Assembly, name=Assembly
**
*Instance, name=PART-1-1, part=PART-1
*End Instance
**
*Elset, elset=ALL_3DSOLID, instance=PART-1-1, generate
1,  2534,     1
*Elset, elset=ALL_MASSIVE_ELEMENTS, instance=PART-1-1, generate
1,  2534,     1
*End Assembly
*Distribution Table, name=TA_TEST_DISCFIELD-1_Table
coord3d, coord3d
**
** MATERIALS
**
**  ---------------------------------------------------
**  ---- SOLID elements -------------------------------
**  ---------------------------------------------------
**
**  following elements refer to a (missing) PSOLID entry with PID = 1
**  DUMMY MATERIAL AND SECTION -=>
*Material, name=MATERIAL_PSOLID_1
*Elastic
1.,0.
** ----------------------------------------------------------------
**
** STEP: Step-1
**
*Step, name=Step-1, nlgeom=NO
WARNING: did not find "SOL=" in Nastran file
*Static
1., 1., 1e-05, 1.
**
** OUTPUT REQUESTS
**
*Restart, write, frequency=0
**
** FIELD OUTPUT: F-Output-1
**
*Output, field, variable=PRESELECT
**
** HISTORY OUTPUT: H-Output-1
**
*Output, history, variable=PRESELECT
*End Step
